matrix := [3.72, 3.47, 3.06; 4.47, 4.10, 3.63; 4.96, 4.53, 4.01]
free_elements := [30.74; 36.80; 40.79]
for_cholesky := transpose(matrix)*matrix
for_gaus := augment(matrix, free_elements)
free_elements_for_cholesky := transpose(matrix)*free_elements
for_gaus = [3.72, 3.47, 3.06, 30.74; 4.47, 4.1, 3.63, 36.8; 4.96, 4.53, 4.01, 40.79]
for_cholesky = [58.4209, 53.7042, 47.4989; 53.7042, 49.3718, 43.6665; 47.4989, 43.6665, 38.6206]
free_elements_for_cholesky = [481.167; 442.326; 391.216]
gaus := rref(for_gaus)
L := Cholesky(for_cholesky, 0)
Lt := transpose(L)
gaus = [1, 0, 0, 6.19518; 0, 1, 0, 1.19518; 0, 0, 1, 1.15904]
x_gaus := submatrix(gaus, 0, 2, 3, 3)
L = [7.64336, 0, 0; 7.02626, 0.0590768, 0; 6.2144, 0.042246, 0.0027572]
Lt = [7.64336, 7.02626, 6.2144; 0, 0.0590768, 0.042246; 0, 0, 0.0027572]
x_gaus = [6.19518; 1.19518; 1.15904]
y := lsolve(L, free_elements_for_cholesky)
|matrix*x_gaus - free_elements| = 7.94411e-15
y = [62.9523; 0.119572; 0.00319569]
x_cholesky := lsolve(Lt, y)
x_cholesky = [6.19518; 1.19518; 1.15904]
|matrix*x_cholesky - free_elements| = 7.1971e-12
