ORIGIN := 1
matrix := [
    16.0, 0.0688, 0.0829, 0.0970;
    0.0496, 15.1, 0.0777, 0.0918;
    0.0444, 0.0585, 14.2, 0.0867;
    0.0393, 0.0534, 0.0674, 13.3
]
free_elements := [24.4781; 26.0849; 27.3281; 28.2078]
Jacobi(A, b, ε) :=
    x0 ← b
    count ← 0
    n ← rows(A)
    while 1
        for i ∈ 1 .. n
            if i > 1
                s1 ← sum(A[i, j]*x0[j], j = 1 .. i - 1)
            else
                s1 ← 0
            if i < n
                s2 ← sum(A[i, j]*x0[j], j = i + 1 .. n)
            else
                s2 ← 0
            x1[i] ← (b[i] - s1 - s2)/A[i, i]
        count ← count + 1
        if |x1 - x0| < ε
            break
        x0 ← x1
    [x1; count]
x := Jacobi(matrix, free_elements, 10^-4)
x[2] = 5
x[1] = [1.5; 1.70001; 1.9; 2.1]
|matrix*x[1] - free_elements| = 3.57356e-7
Zejdel(A, b, ε) :=
    norm ← 1.0
    n ← rows(A)
    count ← 0
    x0 ← b
    while sqrt(|norm|) ≥ ε
        for i ∈ 1 .. n
            var ← 0
            for j ∈ 1 .. n
                if i ≠ j
                    if j > i
                        var ← var + (A[i, j]*x0[j])
                    else
                        var ← var + (A[i, j]*x1[j])
            x1[i] ← (b[i] - var)/A[i, i]
        norm ← sum((x1[i] - var)*(x1[i] - x0[i]), i = 1 .. n)
        count ← count + 1
        x0 ← x1
    [x1; count]
x_zejdel := Zejdel(matrix, free_elements, 10^-4)
x_zejdel[1] = [1.5; 1.70001; 1.9; 2.1]
x_zejdel[2] = 5
|matrix*x_zejdel[1] - free_elements| = 2.90638e-11
Relax(A, b, w, ε) :=
    norm ← 1.0
    count ← 0
    n ← rows(A)
    x0 ← b
    while sqrt(|norm|) ≥ ε
        for i ∈ 1 .. n
            var ← 0
            for j ∈ 1 .. n
                if i ≠ j
                    if j > i
                        var ← var + (A[i, j]*x0[j])
                    else
                        var ← var + (A[i, j]*x1[j])
            x1[i] ← ((1 - w)*x0[i]) + (w*(b[i] - var)/A[i, i])
        norm ← sum((x1[i] - var)*(x1[i] - x0[i]), i = 1 .. n)
        count ← count + 1
        x0 ← x1
    [x1; count]
x_relax := Relax(matrix, free_elements, 0.2, 10^-4)
x_relax[2] = 98
x_relax[1] = [1.5; 1.70001; 1.9; 2.1]
|matrix*x_relax[1] - free_elements| = 1.68506e-7
