Regular(A, B, x0, eps, n) :=
    s ← 0
    for i ∈ 0 .. n
        for k ∈ 0 .. n
            s ← 0
            for j ∈ 0 .. n
                s ← s + A[j, i]*A[j, k]
            a1[i, k] ← s
    for i ∈ 0 .. n
        s ← 0
        for j ∈ 0 .. n
            s ← s + A[j, i]*B[j]
        b1[i] ← s
    alfa ← 0
    while 1
        alfa ← alfa + 0.0000001
        a2 ← a1
        for i ∈ 0 .. n
            a2[i, i] ← a1[i, i] + alfa
            b2[i] ← b1[i] + alfa*x0[i]
        a1 ← a2
        b1 ← b2
        b2 ← lsolve(a2, b2)
        a2 ← a1
        answer ← b2
        x0 ← answer
        b2 ← lsolve(a2, b2)
        max ← 0
        for i ∈ 0 .. n
            if |b2[i] - answer[i]| > max
                max ← |b2[i] - answer[i]|
        if max ≤ eps
            break
    answer
Givens(A, B, n) :=
    ind_matrix ← A
    ind_free ← B
    for i ∈ 0 .. (n - 1)
        for j ∈ (i + 1) .. n
            m ← sqrt(A[i, i]^2*A[j, i])
            l ← A[j, i]/m
            m ← A[i, i]/m
            for k ∈ 0 .. n
                r ← A[i, k]
                ind_matrix[i, k] ← m*ind_matrix[i, k] + l*ind_matrix[j, k]
                ind_matrix[j, k] ← m*ind_matrix[j, k] - l*r
            r ← ind_free[i]
            ind_free[i] ← m*ind_free[i] + l*ind_free[j]
            ind_free[j] ← m*ind_free[j] - l*r
    answer ← ind_free
    for i ∈ (n - 1) .. 0
        for j ∈ n .. (i + 1)
            answer[i] ← answer[i] - (ind_matrix[i, j]*answer[j])
        answer[i] ← answer[i]/ind_matrix[i, i]
    answer
A := [1.03, 0.993; 0.991, 0.052]
B := [2.53; 2.43]
Givens(A, B, 1) = [2.45649; -0.00422293]
Regular(A, B, [1; 1], 10^-1, 1) =  # no stored result
