Givens(A, B, n) :=
    ind_matrix ← A
    ind_free ← B
    for i ∈ 0 .. (n - 1)
        for j ∈ (i + 1) .. n
            m ← sqrt(A[i, i]^2*A[j, i]^2)
            l ← A[j, i]/m
            m ← A[i, i]/m
            for k ∈ 0 .. n
                r ← A[i, k]
                ind_matrix[i, k] ← m*ind_matrix[i, k] + l*ind_matrix[j, k]
                ind_matrix[j, k] ← m*ind_matrix[j, k] - l*r
            r ← ind_free[i]
            ind_free[i] ← m*ind_free[i] + l*ind_free[j]
            ind_free[j] ← m*ind_free[j] - l*r
    answer ← ind_free
    for i ∈ (n - 1) .. 0
        for j ∈ n .. (i + 1)
            answer[i] ← answer[i] - (ind_matrix[i, j]*answer[j])
        answer[i] ← answer[i]/ind_matrix[i, i]
    answer
x_giv := Givens(A, B, 1)  # error: Эта переменная не определена. Проверьте правильность установки обозначения.
|A*x_giv - B| =  # error: Эта переменная не определена. Проверьте правильность установки обозначения.
ORIGIN := 1
A := [1.03, 0.993; 0.991, 0.953]
B := [2.53; 2.43]
x0 := [0; 0]
Br := [2.535; 2.425]
x := lsolve(A, B) = [0.768298; 1.75091]
xr := lsolve(A, Br) = [-3.16619; 5.83704]
δ := 0.005/B[1]*100 = 0.197628
δx := |x[2] + xr[2]|/x[1]*100 = 987.632
δx/δ = 4997.42
a := A[1, 1]/sqrt(A[1, 1]^2 + A[2, 1]^2)
b := A[2, 1]/sqrt(A[1, 1]^2 + A[2, 1]^2)
C := [a*A[1, 1] + b*A[2, 1], a*A[1, 2] + b*A[2, 2]; a*A[2, 1] - b*A[1, 1], a*A[2, 2] - b*A[1, 2]]
D := [a*B[1] + b*B[2]; a*B[2] - b*B[1]] = [3.50796; -0.00302939]
g(t) := lsolve(transpose(A)*A + t*identity(2), transpose(A)*B + t*x)
x_regul := g(0.00001) = [0.768298; 1.75091]
x_giv_alt := lsolve(C, D) = [0.768298; 1.75091]
|A*x_regul - B| = 1.88516e-14
|A*x_giv_alt - B| = 4.44089e-16
