# Worksheet setting: ORIGIN = 1
Newton(f, J, x, ε, max_iter) :=
    iteration ← 0
    while 1
        for i ∈ 1 .. rows(x)
            result[iteration + 1, i] ← x[i]
        result[iteration + 1, rows(x) + 1] ← iteration
        if iteration > 0
            if max(vectorize(|x[1] - xOld[1]|)) < ε
                break
        if iteration ≥ max_iter
            result ← "Max iterations reached"
            break
        iteration ← iteration + 1
        xOld ← x
        try
            x ← x - J(x)^-1*f(x)
        on error
            result ← ["Error calculating new x", x, iteration]
            break
    return result
F(x, y) := [cos(x) + y - 1.2; 2*x - sin(y - 0.5) - 2]
J(x, y) := [-sin(x), 1.0; 2.0, -cos(y - 0.5)]
F(x) := F(x[1], x[2])
J(x) := J(x[1], x[2])
Newton(F, J, [1; 0], 10^-5, 1657) = [1, 0, 0; 1.07888, 0.726075, 1; 1.13844, 0.780186, 2; 1.13882, 0.781331, 3; 1.13882, 0.781331, 4]
ORIGIN := 0
g1(x, y) := 1 + sin(y - 0.5)/2
g2(x, y) := 1.2 - cos(x)
Simple_iter(x, y, maxerr, maxiter) :=
    it ← 0
    Res ← ["step", "x", "y"; it, x, y]
    while 1
        it ← it + 1
        [(x_old ← x), (y_old ← y)]
        [x, y] ← [g1(x_old, y_old), g2(x_old, y_old)]
        [xerr, yerr] ← [|x - x_old|, |y - y_old|]
        Res ← stack(Res, [it, x, y])
        if (it ≥ maxiter) or ((xerr ≤ maxerr) and (yerr ≤ maxerr))
            break
    Res
Simple_iter(0, 1, 10^-3, 1000) = [
    "step", "x", "y";
    0, 0, 1;
    1, 1.23971, 0.2;
    2, 0.85224, 0.874932;
    3, 1.1831, 0.541701;
    4, 1.02084, 0.821948;
    5, 1.15821, 0.677354;
    6, 1.08821, 0.799018;
    7, 1.14729, 0.735931;
    8, 1.11687, 0.789041;
    9, 1.14252, 0.761506;
    10, 1.12927, 0.784694;
    11, 1.14043, 0.772678;
    12, 1.13466, 0.782798;
    13, 1.13952, 0.777556;
    14, 1.137, 0.781971;
    15, 1.13912, 0.779684;
    16, 1.13803, 0.78161;
    17, 1.13895, 0.780613
]
