A := [
    0.58993, 0.036004, -0.32946, 0.27315;
    -4.3515, -0.24076, 2.2030, -2.0148;
    6.7688, 0.39005, -3.5692, 3.1341;
    -31.085, -1.7198, 15.737, -14.393
]
B := [1, 0, 0, 0; 0, 1, 0, 0; 0, 0, 1, 0; 0, 0, 0, 1]
eigenvals(A) = [-3.77522e-6 + 3.87197e-6i; -3.77522e-6 - 3.87197e-6i; -0.125195; -17.4878]
eigenvecs(A) = [
    -0.0523709 - 0.0504019i, -0.0523709 + 0.0504019i, -0.196385, -0.0187624;
    0.979102, 0.979102, -0.0689499, 0.135441;
    0.106967 + 9.87242e-7i, 0.106967 - 9.87242e-7i, -0.843848, -0.212535;
    0.113072 + 0.108856i, 0.113072 - 0.108856i, -0.49457, 0.967539
]
genvals(A, B) = [-3.77522e-6 + 3.87197e-6i; -3.77522e-6 - 3.87197e-6i; -0.125195; -17.4878]
genvecs(A, B) = [
    0.0518231 + 0.0515096i, 0.0518231 - 0.0515096i, -0.232726, 0.0193918;
    -0.984132 - 0.0158684i, -0.984132 + 0.0158684i, -0.0817088, -0.139986;
    -0.107517 - 0.00173463i, -0.107517 + 0.00173463i, -1, 0.219665;
    -0.111888 - 0.111247i, -0.111888 + 0.111247i, -0.586088, -1
]
QR_ALG(A, n) :=
    Q ← QR(A, 0)[0]
    R ← QR(A, 0)[1]
    RQ ← R*Q
    for i ∈ 0 .. n
        Q ← QR(RQ, 0)[0]
        R ← QR(RQ, 0)[1]
        RQ ← R*Q
    [RQ; diag(RQ)]
QR_ALG(A, 10)[1] = [-17.4878; -0.125195; -6.65269e-6; -8.97737e-7]
QR_ALG(A, 10)[0] = [
    -17.4878, -5.55698, 1.74666, 34.3692;
    0, -0.125195, -0.0173343, -0.0330062;
    0, 0, -6.65269e-6, 6.949e-5;
    0, 0, -3.34898e-7, -8.97737e-7
]
