Lagr(x, y, q) :=
    result ← 0.0
    n ← rows(x) - 1
    for i ∈ 0 .. n
        s ← 1.0
        for j ∈ 0 .. n
            if i ≠ j
                s ← s*((q - x[j])/(x[i] - x[j]))
        result ← result + (y[i]*s)
    result
x := [1; 2; 3; 4; 5; 6; 7; 8; 9; 10; 11; 12; 13; 14; 15; 16; 17; 18; 19; 20]
y := [0.17; 0.07; 0.17; 0.05; 0.12; 0.00; 0.01; -0.05; -0.21; -0.50; -0.50; -0.86; -1.24; -1.47; -1.79; -2.25; -2.55; -3.18; -3.60; -3.93]
kvadr(x, y, q) :=
    result ← 0.0
    n ← rows(x)
    a ← [n, 0.0, 0.0; 0.0, 0.0, 0.0; 0.0, 0.0, 0.0]
    b ← [0.0; 0.0; 0.0]
    for i ∈ 0 .. n - 1
        for j ∈ 0 .. 2
            for k ∈ 0 .. 2
                a[j, k] ← a[j, k] + x[i]^(j + k)
            b[j] ← b[j] + y[i]*x[i]^j
    b ← lsolve(a, b)
    result ← b[0] + (b[1]*q) + (b[2]*q^2)
    result
s := cspline(x, y)
A(t) := interp(s, x, y, t)
V(X, x) :=
    for k ∈ 0 .. rows(X) - 2
        u[k + 1] ← product(x - X[i], i = 0 .. k)
    u[0] ← 1
    u
N(x, y, t) :=
    n ← rows(x) - 1
    for i ∈ 0 .. n
        d[i, 0] ← y[i]
    for k ∈ 1 .. n
        for m ∈ 0 .. n - k
            d[m, k] ← (d[m + 1, k - 1] - d[m, k - 1])/(x[m + k] - x[m])
    V(x, t)*transpose(d)[:, 0]
A(3) = 0.17
Lagr(x, y, 3) = 0.17
kvadr(x, y, 3) = 0.188977
p(t) := N(x, y, t)
p(3) = 0.17
