# Worksheet setting: ORIGIN = 1
f(x, y1, y2) := [(y1 + x)/(y1^2 + y2^2); cos(y1 + x*y2)]
Euler(a, b, N, us) :=
    h ← (b - a)/N
    u[1, 1] ← us[1]
    u[1, 2] ← us[2]
    x[1] ← a
    for i ∈ 2 .. N + 1
        u[i, 1] ← u[i - 1, 1] + h*f(x[i - 1], u[i - 1, 1], u[i - 1, 2])[1]
        u[i, 2] ← u[i - 1, 2] + h*f(x[i - 1], u[i - 1, 1], u[i - 1, 2])[2]
        x[i] ← x[i - 1] + h
    augment(x, u)
u0 := [1.0; -1.0]
N := 10
a := 2.0
b := 4.0
Euler(a, b, N, u0) = [
    2, 1, -1;
    2.2, 1.3, -0.89194;
    2.4, 1.58163, -0.734219;
    2.6, 1.84352, -0.537469;
    2.8, 2.08453, -0.357042;
    3, 2.30294, -0.263626;
    3.2, 2.50033, -0.251887;
    3.4, 2.68086, -0.276524;
    3.6, 2.8483, -0.310338;
    3.8, 3.0054, -0.342258;
    4, 3.15416, -0.368983
]
prognoz(a, b, N, us) :=
    h ← (b - a)/N
    u[1, 1] ← us[1]
    u[1, 2] ← us[2]
    x[1] ← a
    for i ∈ 2 .. N + 1
        u[i, 1] ← u[i - 1, 1] + h*f(x[i - 1] + 0.5*h, u[i - 1, 1] + 0.5*h*u[i - 1, 1], u[i - 1, 2] + 0.5*h*u[i - 1, 2])[1]
        u[i, 2] ← u[i - 1, 2] + h*f(x[i - 1] + 0.5*h, u[i - 1, 1] + 0.5*h*u[i - 1, 1], u[i - 1, 2] + 0.5*h*u[i - 1, 2])[2]
        x[i] ← x[i - 1] + h
    augment(x, u)
prognoz(a, b, N, u0) = [
    2, 1, -1;
    2.2, 1.26446, -0.929396;
    2.4, 1.51219, -0.814768;
    2.6, 1.74542, -0.647169;
    2.8, 1.96579, -0.44717;
    3, 2.17167, -0.298924;
    3.2, 2.36046, -0.258936;
    3.4, 2.5333, -0.27607;
    3.6, 2.69332, -0.306544;
    3.8, 2.84319, -0.335288;
    4, 2.98491, -0.358899
]
Runge(a, b, N, us) :=
    h ← (b - a)/N
    u[1, 1] ← us[1]
    u[1, 2] ← us[2]
    x[1] ← a
    for i ∈ 2 .. N + 1
        for j ∈ 1 .. 2
            k1 ← f(x[i - 1], u[i - 1, 1], u[i - 1, 2])[j]
            k2 ← f(x[i - 1] + h/2.0, u[i - 1, 1] + h*k1/2.0, u[i - 1, 2] + h*k1/2.0)[j]
            k3 ← f(x[i - 1] + h/2.0, u[i - 1, 1] + h*k2/2.0, u[i - 1, 2] + h*k2/2.0)[j]
            k4 ← f(x[i - 1] + h, u[i - 1, 1] + h*k3, u[i - 1, 2] + h*k3)[j]
            u[i, j] ← u[i - 1, j] + h*((k1 + (k2*2.0) + (k3*2.0) + k4)/6.0)
        x[i] ← x[i - 1] + h
    augment(x, u)
Runge(a, b, N, u0) = [
    2, 1, -1;
    2.2, 1.31515, -0.878645;
    2.4, 1.5958, -0.696979;
    2.6, 1.85143, -0.503636;
    2.8, 2.08316, -0.362091;
    3, 2.29259, -0.28844;
    3.2, 2.48364, -0.264551;
    3.4, 2.66024, -0.269265;
    3.6, 2.82536, -0.287806;
    3.8, 2.98116, -0.311368;
    4, 3.12925, -0.335193
]
