a := 2
n := 30
b := 4
h := (b - a)/n
y1 := -1
y2 := 1
f1(x, y1, y2) := (y1 + x)/(y1^2 + y2^2)
f2(x, y1, y2) := cos(y1 + x*y2)
ORIGIN := 0
D(x, y) := [f1(x, y[0], y[1]); f2(x, y[0], y[1])]
y0 := [1; -1]
Adams(y0, a, b, 10, D) = [
    2, 1, -1;
    2.2, 1.29483, -0.863926;
    2.4, 1.57484, -0.677829;
    2.6, 1.83359, -0.487599;
    2.8, 2.06719, -0.354727;
    3, 2.27752, -0.2923;
    3.2, 2.4691, -0.278138;
    3.4, 2.64601, -0.289307;
    3.6, 2.8113, -0.311116;
    3.8, 2.9672, -0.335547;
    4, 3.11534, -0.358716
]
rkfixed(y0, a, b, 10, D) = [
    2, 1, -1;
    2.2, 1.29481, -0.863981;
    2.4, 1.57481, -0.677963;
    2.6, 1.83355, -0.487776;
    2.8, 2.06714, -0.354985;
    3, 2.27747, -0.292602;
    3.2, 2.46905, -0.278413;
    3.4, 2.64596, -0.289511;
    3.6, 2.81126, -0.311246;
    3.8, 2.96716, -0.335616;
    4, 3.1153, -0.358741
]
